# OpenSim document version 40000
AnalyzeTool Moco:
  model_file: ..\..\OpenSim\Out\Moco\1s_con_tol_em1_higherWeight_check_Lck_initGuess_nMusc_500_setTime_tran_000_rot_000_RC_1\FSModel_GHJoint.osim
  replace_force_set: false
  results_directory: ..\..\OpenSim\Out\Moco\1s_con_tol_em1_higherWeight_check_Lck_initGuess_nMusc_500_setTime_tran_000_rot_000_RC_1\
  output_precision: 8
  initial_time: 0
  final_time: 0.55
  solve_for_equilibrium_for_auxiliary_states: false
  maximum_number_of_integrator_steps: 20000
  maximum_integrator_step_size: 1
  minimum_integrator_step_size: 1e-8
  integrator_error_tolerance: 1e-5
  states_file: ..\..\OpenSim\Out\Moco\1s_con_tol_em1_higherWeight_check_Lck_initGuess_nMusc_500_setTime_tran_000_rot_000_RC_1\MocoSol_LatReach.sto
  lowpass_cutoff_frequency_for_coordinates: -1
  AnalysisSet Analyses:
    JointReaction: start_time=0 end_time=0.55 step_interval=1 in_degrees=true joint_names=shoulder0
        apply_on_bodies=parent express_in_frame=/bodyset/scapula/glenoid_centre/
